// COMSOL Multiphysics 5.6.0.401 model "normal.mph"
// Outline of the model tree

Parameters
  area = 80E-4[m^2]  // Active cell area
  lA = 0.09[m]  // Length of flow field
  wA = area/lA  // Width of flow field
  hA = 15E-4[m]  // Height of anode channel
  hC = 15E-4[m]  // Cathode channel height
  r_region = 1  // Ratio of area pre/post cell to cell area
  P = 101325 [Pa]  // Gas pressure
  T = 750+273.15 [K]  // Furnace temperature
  yH2f = 0.8  // Feed mole fraction of H2
  yH2Of = 1-yH2f  // Feed mole fraction of H2O
  yO2f = 0.21  // Cathode gas O2 mole fraction
  i_cell = 20 [A]  // Current through cell
  Uf = 0.8  // fuel utilization
  Ua = 0.15  // Air, cathode utilization
  NAf = i_cell/(2*Fa*Uf*yH2f*wA)  // Anode gas flux into cell
  NCf = i_cell/(4*Fa*Ua*yO2f*wA)  // Cathode gas flux into cell
  Rg = 8.314472[J/(mol*K)]  // Gas constant coefficient
  Fa = 96485.3415[C/mol]  // Faraday constant
  D_A = 7.0E-4[m^2/s]  // Binary diffusion coefficient H2, H2O
  D_C = 1.7E-4 [m^2/s]  // Cathode gas binary diffusion coefficient
  jN = i_cell/area  // Norminal distributed current density
  jN11 = 1/area
  sigma_ts = 1E6 [A/V]  // Electrical conductivity of interconnect
  N1 = 1.2855 [V]  // N1
  N2 = -2.8748E-4 [V/K]  // N2
  N3 = 4.3087E-5 [V/K]  // N3
  A1 = 8.6173E-5 [V/K]  // A1
  A2 = 1.0E4 [A/m^2]  // A2
  O1 = 1.5E-10 [V*m^2/(A*K)]  // O1
  O2 = 5.0E3 [K]  // O2
  Cdl = 100 [A*s/(V*m^2)]  // double layer capacitance
  f = 1[Hz]
  k_ts = 0.05 [W/K]
  h_conv = 150 [W/m^2/K]
  wall_loss = 0 [K/m]
  conv_to_cond = 30 [1/m]

Functions
  an6: Analytic "activation overpotential" | funcname = nact; expr = A1*T*asinh(jF/A2); args = {jF, T}; argunit = A/m^2, K; fununit = V
  an1: Analytic "voltage function" | funcname = fV; expr = N1+N2*T+N3*T*log(yH2*sqrt(yO2)/yH2O)-nact(jF,T)-O1*T*exp(O2/T)*jF; args = {yH2, yH2O, yO2, jF, T}; argunit = 1,1,1,A/m^2, K; fununit = V
  an12: Analytic "dVdjC" | funcname = dVdjC; expr = -O1*T*exp(O2/T); args = T; argunit = K; fununit = V/A*m^2
  an7: Analytic "dnactdjF(jF)" | funcname = dnactdjF; expr = d(nact(jF, T), jF); args = {jF, T}; argunit = A/m^2, K; fununit = V/(A/m^2)
  an8: Analytic "HfO2" | funcname = HfO2; expr = 34.961*x - 12251; argunit = K; fununit = J/(mol)
  an9: Analytic "HfN2" | funcname = HfN2; expr = 32.817*x - 11345; argunit = K; fununit = J/(mol)
  an10: Analytic "HfH2" | funcname = HfH2; expr = 30.295*x - 9609.3; argunit = K; fununit = J/(mol)
  an11: Analytic "HfH2O" | funcname = HfH2O; expr = 41.556*x - 257361; argunit = K; fununit = J/(mol)
  an13: Analytic "electrochemical rxn gen" | funcname = elec_H; expr = jF*( HfH2(Tg)/(2*Fa)+HfO2(Tg)/(4*Fa)-HfH2O(Tg)/(2*Fa) ); args = {jF, Tg}; argunit = A/m^2, K; fununit = W/m^2
  an14: Analytic "enthalpy x-dir" | funcname = Hx; expr = NAf*( yH2*HfH2(Tg) + yH2O*HfH2O(Tg) ) + NC*( yO2*HfO2(Tg)+(1-yO2)*HfN2(Tg) ); args = {yH2, yH2O, yO2, NC, Tg}; argunit = 1,1,1,mol/m/s, K; fununit = W/m

Variables
  var1 "frequency"
    omega = 2*pi*f

Probes
  pdom1: DomainPoint "Domain Point Probe 1" | bndsnap2 = on; coords = {0, wA/2}
    ppb1: PointExpr "Real impedance" | probename = Z11_re; expr = -real(V11); unit = V; descr = Z11_re; table = tbl1
    ppb2: PointExpr "Imaginary impedance" | probename = Z11_im; expr = imag(V11); unit = V; descr = Z11_im; table = tbl1

Geometry
  geom1 "Geometry 1" (2D, length unit m)
    r1: Rectangle | size = {lA, wA}
    r2: Rectangle | pos = {-lA*r_region, 0}; size = {lA*r_region, wA}
    fin: Finalize "Form Union"

Physics
  yH2: CoefficientFormPDE "yH2ss eqn" on all domains
    dependent variable yH2
    Units.CustomSourceTermUnit = mol/(m^2*s)
    cfeq1: CoefficientFormPDE (default)
      c = {D_A*P*hA/(Rg*Tg), 0, 0, D_A*P*hA/(Rg*Tg)}
      f = -jF/(2*Fa)
      da = 0
      be = {NAf, 0}
    zflx1: ZeroFluxBoundary "Zero Flux 1" (default)
    init1: init "Initial Values 1" (default) | yH2 = yH2f
    cfeq2: CoefficientFormPDE on domains 1 | c = {D_A*P*hA/(Rg*T), 0, 0, D_A*P*hA/(Rg*T)}; f = 0; da = 0; be = {NAf, 0}
    dir1: DirichletBoundary "Dirichlet Boundary Condition 1" on boundaries 1 | r = yH2f
  yH2O: CoefficientFormPDE "yH2Oss eqn" on all domains
    dependent variable yH2O
    Units.CustomSourceTermUnit = mol/(m^2*s)
    cfeq1: CoefficientFormPDE (default)
      c = {D_A*P*hA/(Rg*Tg), 0, 0, D_A*P*hA/(Rg*Tg)}
      f = jF/(2*Fa)
      da = 0
      be = {NAf, 0}
    zflx1: ZeroFluxBoundary "Zero Flux 1" (default)
    init1: init "Initial Values 1" (default) | yH2O = yH2Of
    cfeq2: CoefficientFormPDE on domains 1 | c = {D_A*P*hA/(Rg*T), 0, 0, D_A*P*hA/(Rg*T)}; f = 0; da = 0; be = {NAf, 0}
    dir1: DirichletBoundary "Dirichlet Boundary Condition 1" on boundaries 1 | r = yH2Of
  yO2: CoefficientFormPDE "yO2ss eqn" on domains 1, 2
    dependent variable yO2
    Units.CustomSourceTermUnit = mol/(m^2*s)
    cfeq1: CoefficientFormPDE (default)
      c = {D_C*P*hC/(Rg*Tg), 0, 0, D_C*P*hC/(Rg*Tg)}
      a = NCx
      f = -jF/(4*Fa)
      da = 0
      be = {NC, 0}
    zflx1: ZeroFluxBoundary "Zero Flux 1" (default)
    init1: init "Initial Values 1" (default) | yO2 = yO2f
    cfeq2: CoefficientFormPDE on domains 1
      c = {D_C*P*hC/(Rg*T), 0, 0, D_C*P*hC/(Rg*T)}
      a = NCx
      f = 0
      da = 0
      be = {NC, 0}
    dir1: DirichletBoundary "Dirichlet Boundary Condition 1" on boundaries 1 | r = yO2f
  NC: CoefficientFormPDE "NCss eqn" on domains 1, 2
    dependent variable NC
    Units.DependentVariableQuantity = molarsurfaceflux
    Units.CustomSourceTermUnit = mol/(m^2*s)
    cfeq1: CoefficientFormPDE (default) | c = {0, 0, 0, 0}; f = -jF/(4*Fa); da = 0; be = {1, 0}
    zflx1: ZeroFluxBoundary "Zero Flux 1" (default)
    init1: init "Initial Values 1" (default) | NC = NCf
    cfeq2: CoefficientFormPDE on domains 1 | c = {0, 0, 0, 0}; f = 0; da = 0; be = {1, 0}
    dir1: DirichletBoundary "Dirichlet Boundary Condition 1" on boundaries 1 | r = NCf
  jF: DomainODE "jFss eqn" on domains 2
    dependent variable jF
    Units.DependentVariableQuantity = currentdensity
    Units.SourceTermQuantity = electricpotential
    dode1: DistributedODE (default) | f = V-fV(yH2, yH2O, yO2, jF, Ts); da = 0
    init1: init "Initial Values 1" (default) | jF = jN
  V: CoefficientFormPDE "Vss eqn" on domains 2
    dependent variable V
    Units.DependentVariableQuantity = electricpotential
    Units.SourceTermQuantity = currentdensity
    cfeq1: CoefficientFormPDE (default) | c = {sigma_ts, 0, 0, sigma_ts}; f = jF-jN; da = 0
    zflx1: ZeroFluxBoundary "Zero Flux 1" (default)
    init1: init "Initial Values 1" (default) | V = fV(yH2f,yH2Of,yO2f,jN,T)
  Ts: CoefficientFormPDE on domains 2
    dependent variable Ts
    Units.DependentVariableQuantity = temperature
    Units.SourceTermQuantity = irreversible_heat_flux
    cfeq1: CoefficientFormPDE (default)
      c = {k_ts, 0, 0, k_ts}
      a = 0
      f = h_conv*(Tg-Ts) + elec_H(jF, Tg) - jF*V
      ea = 0
      da = 0
    zflx1: ZeroFluxBoundary "Zero Flux 1" (default)
    init1: init "Initial Values 1" (default) | Ts = T
    flux1: FluxBoundary "Flux/Source 1" on boundaries 4, 7 | g = -conv_to_cond*k_ts*(Ts-Tg)
    flux2: FluxBoundary "Flux/Source 2" on boundaries 5, 6 | g = -k_ts*wall_loss
  Tg: CoefficientFormPDE on domains 2
    dependent variable Tg
    cfeq1: CoefficientFormPDE (default)
      c = {0, 0, 0, 0}
      f = h_conv*(Ts-Tg) - d(Hx(yH2, yH2O, yO2, NC, Tg), x) - elec_H(jF, Tg)
    zflx1: ZeroFluxBoundary "Zero Flux 1" (default)
    init1: init "Initial Values 1" (default) | Tg = T
    dir1: DirichletBoundary "Dirichlet Boundary Condition 1" on boundaries 4 | r = T
  yH211: CoefficientFormPDE "yH211 eqn" on all domains
    dependent variable yH211
    Units.DependentVariableQuantity = none
    Units.CustomDependentVariableUnit = 1/A
    Units.CustomSourceTermUnit = mol/(m^2*s*A)
    cfeq1: CoefficientFormPDE (default)
      c = {D_A*P*hA/(Rg*Tg), 0, 0, D_A*P*hA/(Rg*Tg)}
      a = P*hA/(Rg*T)*(1i*omega)
      f = -jF11/(2*Fa)
      da = 0
      be = {NAf, 0}
    zflx1: ZeroFluxBoundary "Zero Flux 1" (default)
    init1: init "Initial Values 1" (default)
    cfeq2: CoefficientFormPDE on domains 1
      c = {D_A*P*hA/(Rg*T), 0, 0, D_A*P*hA/(Rg*T)}
      a = P*hA/(Rg*T)*(1i*omega)
      f = 0
      da = 0
      be = {NAf, 0}
    dir1: DirichletBoundary "Dirichlet Boundary Condition 1" on boundaries 1 | r = 0
  yH2O11: CoefficientFormPDE "yH2O11 eqn" on all domains
    dependent variable yH2O11
    Units.DependentVariableQuantity = none
    Units.CustomDependentVariableUnit = 1/A
    Units.CustomSourceTermUnit = mol/(m^2*s*A)
    cfeq1: CoefficientFormPDE (default)
      c = {D_A*P*hA/(Rg*Tg), 0, 0, D_A*P*hA/(Rg*Tg)}
      a = P*hA/(Rg*T)*(1i*omega)
      f = jF11/(2*Fa)
      da = 0
      be = {NAf, 0}
    zflx1: ZeroFluxBoundary "Zero Flux 1" (default)
    init1: init "Initial Values 1" (default)
    cfeq2: CoefficientFormPDE on domains 1
      c = {D_A*P*hA/(Rg*T), 0, 0, D_A*P*hA/(Rg*T)}
      a = P*hA/(Rg*T)*(1i*omega)
      f = 0
      da = 0
      be = {NAf, 0}
    dir1: DirichletBoundary "Dirichlet Boundary Condition 1" on boundaries 1 | r = 0
  yO211: CoefficientFormPDE "yO211 eqn" on domains 1, 2
    dependent variable yO211
    Units.DependentVariableQuantity = none
    Units.CustomDependentVariableUnit = 1/A
    Units.CustomSourceTermUnit = mol/(m^2*s*A)
    cfeq1: CoefficientFormPDE (default)
      c = {D_C*P*hC/(Rg*Tg), 0, 0, D_C*P*hC/(Rg*Tg)}
      a = P*hC/(Rg*T)*(1i*omega) +NCx
      f = - d( yO2*NC11, x ) - jF11/(4*Fa)
      da = 0
      be = {NC, 0}
    zflx1: ZeroFluxBoundary "Zero Flux 1" (default)
    init1: init "Initial Values 1" (default)
    cfeq2: CoefficientFormPDE on domains 1
      c = {D_C*P*hC/(Rg*T), 0, 0, D_C*P*hC/(Rg*T)}
      a = P*hC/(Rg*T)*(1i*omega) +NCx
      f = - d( yO2*NC11, x )
      da = 0
      be = {NC, 0}
    dir1: DirichletBoundary "Dirichlet Boundary Condition 1" on boundaries 1 | r = 0
  NC11: CoefficientFormPDE "NC11 eqn" on domains 1, 2
    dependent variable NC11
    Units.DependentVariableQuantity = none
    Units.CustomDependentVariableUnit = mol/(m*s*A)
    Units.CustomSourceTermUnit = mol/(m^2*s*A)
    cfeq1: CoefficientFormPDE (default) | c = {0, 0, 0, 0}; f = -jF11/(4*Fa); da = 0; be = {1, 0}
    zflx1: ZeroFluxBoundary "Zero Flux 1" (default)
    init1: init "Initial Values 1" (default)
    cfeq2: CoefficientFormPDE on domains 1 | c = {0, 0, 0, 0}; f = 0; da = 0; be = {1, 0}
    dir1: DirichletBoundary "Dirichlet Boundary Condition 1" on boundaries 1 | r = 0
  V11: CoefficientFormPDE "V11 eqn" on domains 2
    dependent variable V11
    Units.DependentVariableQuantity = none
    Units.CustomDependentVariableUnit = V/A
    Units.SourceTermQuantity = none
    Units.CustomSourceTermUnit = 1/m^2
    cfeq1: CoefficientFormPDE (default) | c = {sigma_ts, 0, 0, sigma_ts}; f = jF11+jC11-jN11; da = 0
    zflx1: ZeroFluxBoundary "Zero Flux 1" (default)
    init1: init "Initial Values 1" (default)
  jF11: DomainODE "jF11 eqn" on domains 2
    dependent variable jF11
    Units.DependentVariableQuantity = none
    Units.CustomDependentVariableUnit = 1/m^2
    Units.SourceTermQuantity = none
    Units.CustomSourceTermUnit = V/A
    dode1: DistributedODE (default)
      f = V11-( d(fV(yH2, yH2O, yO2, jF, Ts),yH2)*yH211 +d(fV(yH2, yH2O, yO2, jF, Ts),yH2O)*yH2O11 + d(fV(yH2, yH2O, yO2, jF, Ts),yO2)*yO211 + d(fV(yH2, yH2O, yO2, jF, Ts),jF)*jF11 + dVdjC(Ts)*jC11 )
      da = 0
    init1: init "Initial Values 1" (default)
  jC11: DomainODE "jC11 eqn" on domains 2
    dependent variable jC11
    Units.DependentVariableQuantity = none
    Units.CustomDependentVariableUnit = 1/m^2
    Units.SourceTermQuantity = none
    Units.CustomSourceTermUnit = 1/m^2
    dode1: DistributedODE (default) | f = jC11 - Cdl*(1i*omega)*d(nact(jF,Ts), jF)*jF11; da = 0
    init1: init "Initial Values 1" (default)

Mesh
  mesh1 "Mesh 1" (physics-controlled)

Studies
  std1 "Study 1"
    stat: Stationary "steady state (ss)" | solve for = {yH2, yH2O, yO2, NC, jF, V, Ts, Tg}; pdistrib = on
  std2 "Study 2"
    param: Parametric "Parametric Sweep"
      pname = f
      plistarr = 10^range(-2, 0.1, 5)
      punit = Hz
      keepsol = last
      useaccumtable = on
      accumtable = tbl1
    stat: Stationary "first harmonics (11)"
      solve for = {yH211, yH2O11, yO211, NC11, V11, jF11, jC11}
      usesol = on
      notsolmethod = sol
      notstudy = std1
      pdistrib = on

Solver configurations
  sol1 "Solution 1" (study std1)
    v1: Variables "Dependent Variables 1"
    s1: Stationary "Stationary Solver 1"
      dDef: Direct
      fc1: FullyCoupled
  sol2 "Solution 2" (study std2)
    v1: Variables "Dependent Variables 1" | notsolmethod = sol
    s1: Stationary "Stationary Solver 1"
      dDef: Direct
      p1: Parametric | pname = f; plistarr = 10^range(-2, 0.1, 5); punit = Hz; pcontinuationmode = no
      fc1: FullyCoupled

Datasets
  dset1: Solution | solution = sol1
  cln1: CutLine2D | data = dset1; genpoints = {{-lA*r_region, wA/2}, {lA*(1+r_region), wA/2}}
  dset2: Solution | solution = sol2
  dset3: Solution "Probe Solution 3" | solution = sol2
  cpt1: CutPoint2D "Domain Point Probe 1" | data = dset3; pointx = 0; pointy = 0.5*wA

Derived values
  pev1: EvalPoint "Real impedance" | data = cpt1; table = tbl1; expr = -real(V11)
  pev2: EvalPoint "Imaginary impedance" | data = cpt1; table = tbl1; expr = imag(V11)

Evaluation groups
  eg1: EvaluationGroup "Model self check" | data = dset1
    av1: AvLine "Line Average - yi" on boundaries 7
      expr = {yH2, yH2O, yO2}
      unit = {1, 1, 1}
      descr = {exit yH2, exit yH2O, exit yO2}
    int1: IntSurface "Surface Integration - i_cell" on domains 2 | expr = jF; unit = A; descr = i_cell
    int2: IntSurface "Surface Integration - AC" on domains 2
      data = dset2
      expr = {jF11+jC11, }
      unit = {1, }
      descr = {i11, }

Tables
  tbl1: Table "Probe Table 1"
    f (Hz) | Z11_re (Ω), Point: (0, 0.5*wA) | Z11_im (Ω), Point: (0, 0.5*wA)
    0.01 | 0.00996817 | 0.000286982
    0.0125893 | 0.00996108 | 0.000360914
    0.0158489 | 0.00994988 | 0.000453616
    0.0199526 | 0.0099322 | 0.000569584
    0.0251189 | 0.00990436 | 0.000714121
    0.0316228 | 0.00986071 | 0.000893216
    0.0398107 | 0.00979266 | 0.00111309
    0.0501187 | 0.00968758 | 0.00137913
    0.0630957 | 0.00952763 | 0.00169374
    0.0794328 | 0.00928945 | 0.00205265
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
Plots
  pg1: PlotGroup2D "yH2ss contour plot" | data = dset1; xlabel = x [m]; ylabel = y [m]
    surf1: Surface | expr = yH2
  pg2: PlotGroup2D "yH2Oss contour plot" | data = dset1
    surf1: Surface | expr = yH2O
  pg5: PlotGroup2D "yO2ss contour plot" | data = dset1
    surf1: Surface | expr = yO2
  pg6: PlotGroup2D "NCss contour plot" | data = dset1
    surf1: Surface | expr = NC
  pg3: PlotGroup2D "jFss contour plot" | data = dset1
    surf1: Surface | expr = jF
  pg4: PlotGroup2D "Vss contour plot" | data = dset1
    surf1: Surface | expr = V
  pg11: PlotGroup2D "Ts" | data = dset1; xlabel = x [m]; ylabel = y [m]
    surf1: Surface | expr = Ts-273.15
  pg12: PlotGroup2D "Tg" | data = dset1; title = Surface: Tg (C); xlabel = x [m]; ylabel = y [m]
    surf1: Surface | expr = Tg-273.15
  pg7: PlotGroup1D "yiss line plot" | data = dset1; ylabel = mole fraction
    lngr1: LineGraph | data = cln1; expr = yH2; xdata = expr; xdataexpr = x; legends = yH2
    lngr2: LineGraph | data = cln1; expr = yH2O; xdata = expr; xdataexpr = x; legends = yH2O
    lngr3: LineGraph | data = cln1; expr = yO2; xdata = expr; xdataexpr = x; legends = yO2
  pg8: PlotGroup1D "jFss line plot" | data = dset1; ylabel = jF (A/m^2)
    lngr1: LineGraph | data = cln1; expr = jF; xdata = expr; xdataexpr = x; legends = jF [A/m2]
  pg9: PlotGroup1D "Nyquist plot" | data = dset1; xlabel = Z11_re (Ω); ylabel = Z11_im (Ω); preserveaspect = on
    tblp1: Table "Table Graph 1" | table = tbl1; xaxisdata = 2; plotcolumninput = manual
  pg10: PlotGroup1D "Bode plot" | xlabel = f (Hz); ylabel = Z11_im
    tblp1: Table "Probe Table Graph 1" | table = tbl1